// COMSOL Multiphysics 6.1.0.357 model "part3a.mph"
// Outline of the model tree

Probes
  point1: Point "Point Probe 1" on points 3 | expr = u; unit = 1; descr = Dependent variable u; table = tbl1

Geometry
  geom1 "Geometry 1" (2D, length unit m)
    r1: Rectangle | size = {12, 5}
    pt1: Point | p = {6, 2}
    fin: Finalize "Form Union"

Physics
  poeq: PoissonEquation "Poisson's Equation" on all domains
    dependent variable u
    EquationForm.form = Automatic
    peq1: PoissonEquation "Poisson's Equation 1" (default) | f = 100*exp(-0.5*(x-4)^2 - 4 * (y - 1)^2)
    zflx1: ZeroFluxBoundary "Zero Flux 1" (default)
    init1: init "Initial Values 1" (default)
    dir1: DirichletBoundary "Dirichlet Boundary Condition 1" on boundaries 2 | r = 25

Mesh
  mesh1 "Mesh 1" (physics-controlled)
    size: MeshSizeDefault | hauto = 1

Studies
  std1 "Study 1"
    stat: Stationary

Solver configurations
  sol1 "Solution 1" (study std1)
    v1: Variables "Dependent Variables 1"
    s1: Stationary "Stationary Solver 1"
      dDef: Direct
      fc1: FullyCoupled | linsolver = dDef

Datasets
  dset1: Solution | solution = sol1
  dset2: Solution "Probe Solution 2" | solution = sol1
  avh1: Average "Point Probe 1" on points 3 | data = dset2

Derived values
  pev1: EvalPoint "Point Probe 1" | data = avh1; table = tbl1; expr = u

Tables
  tbl1: Table "Probe Table 1"
    Dependent variable u (1), Point Probe 1
    47.2253

Plots
  pg1: PlotGroup2D "Poisson's Equation" | data = dset1; xlabel = x; ylabel = y
    surf1: Surface | expr = u; title = plot of 3a