// COMSOL Multiphysics 6.1.0.357 model "part3d.mph"
// Outline of the model tree

Parameters
  alpha = 0.06
  T_ext = 25
  L_x = 12
  L_y = 5

Probes
  bnd1: Boundary "Boundary Probe 1" on boundaries 3 | expr = u; unit = 1; descr = Dependent variable u; table = tbl1

Geometry
  geom1 "Geometry 1" (2D, length unit m)
    r1: Rectangle | size = {L_x, L_y}
    c1: Circle | pos = {6.5, 3}; r = 0.4
    c2: Circle | pos = {6.5, 4}; r = 0.4
    c3: Circle | pos = {5.5, 3}; r = 0.4
    c4: Circle | pos = {5.5, 4}; r = 0.4
    dif1: Difference | input = r1; input2 = c1, c2, c3, c4
    fin: Finalize "Form Union"

Physics
  poeq: PoissonEquation "Poisson's Equation" on all domains
    dependent variable u
    EquationForm.form = Automatic
    peq1: PoissonEquation "Poisson's Equation 1" (default) | f = 100*exp(-0.5*(x-4)^2 - 4 * (y - 1)^2)
    zflx1: ZeroFluxBoundary "Zero Flux 1" (default)
    init1: init "Initial Values 1" (default)
    flux1: FluxBoundary "Flux/Source 1" on boundaries 1, 3-20 | g = -alpha*(u-T_ext)

Mesh
  mesh1 "Mesh 1" (physics-controlled)
    size: MeshSizeDefault | hauto = 1

Studies
  std1 "Study 1"
    stat: Stationary

Solver configurations
  sol1 "Solution 1" (study std1)
    v1: Variables "Dependent Variables 1"
    s1: Stationary "Stationary Solver 1"
      dDef: Direct
      fc1: FullyCoupled | linsolver = dDef

Datasets
  dset1: Solution | solution = sol1
  dset2: Solution "Probe Solution 2" | solution = sol1
  avh1: Average "Boundary Probe 1" on boundaries 3 | data = dset2

Derived values
  pev1: EvalPoint "Boundary Probe 1" | data = avh1; table = tbl1; expr = u

Tables
  tbl1: Table "Probe Table 1"
    Dependent variable u (1), Boundary Probe 1
    134.099

Plots
  pg1: PlotGroup2D "Poisson's Equation" | data = dset1
    surf1: Surface | expr = u
  pg2: PlotGroup1D "Probe Plot Group 2"
    tblp1: Table "Probe Table Graph 1" | table = tbl1